a := 0.125
b := 45.435
R1 := 0.05
c := 162.6
V1 := 50
x := a*(c - b^2)/(b*nthroot(c, 5))
u := 5
cos(α) := V1/sqrt(V1^2 + u^2)
d := 3
x = -1.88993
n := 100000
cos(α) → 10*sqrt(101)/101
N := n*d*π*R1/cos(α)  # error: This variable is undefined.
sum((-1)^(k + 1)/(k*(k + 1)), k = 50 .. 1) → 598273895158796627753/1549522252122998353200
N → 4712.38898038*sqrt(101)
integral(x^3*sqrt(1 + x), x) → 2.15763193019i
integral(x^2*cos(5*x - 2)*e^(-2*x + 1), x = 0 .. ∞) → 5*sqrt(101)*e/202
