A := [1, 5, 8, 3; 0, 2, 5.6, 7; 6, 0, -8, -3; 4, 2.3, 5, 8]
B := [1; 8; 6; -7]
X2 := transpose(A)*B = [9; 4.9; -30.2; -15]
X3 := A^3 = [
    135, 436.2, 904.64, 679.3;
    282.8, 470.56, 860.16, 746.9;
    600, -182.4, -988.64, -147.3;
    643.68, 593.33, 795.26, 981.16
]
X1 := A*7.25 = [7.25, 36.25, 58, 21.75; 0, 14.5, 40.6, 50.75; 43.5, 0, -58, -21.75; 29, 16.675, 36.25, 58]
X4 := transpose(B)*A*transpose(A)*A^2*B = 233348
Y := A
Y[:, 2] := B
Y = [1, 5, 1, 3; 0, 2, 8, 7; 6, 0, 6, -3; 4, 2.3, -7, 8]
x3 := Y/A = [
    0.699383, 3.23356, 1.48895, -2.15827;
    0.103069, -0.108648, -0.510498, 0.739979;
    0.601233, -6.46711, -1.9779, 4.31655;
    -0.515343, 5.54324, 2.55249, -2.6999
]
x := lsolve(A, B)
x = [-6.55396; 10.5755; -7.08707; 3.79093]
