k(x1) := 3*sin(3*π*x1)*cos(2*π*x1)
y(x) := 2*x/5 + 1/5*ln(|3*sin(x) + 4*cos(x) - 2|) + 4/(5*sqrt(21))*ln(|(sqrt(7) + sqrt(3)*(2*tan(x/2) - 1))/(sqrt(7) - sqrt(3)*(2*tan(x/2) - 1))|)
z(x1) := cos(4*π*x1)^2*sin(π*x1)
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p := 1 .. 2
r := 1 .. 2
W(X3) := X3^3 - 5/2*X3^2 - 2*X3 + 3/2
t := FRAME
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cos(t*p)*sin(t*r)*sin(cos(t)) = [0; 0; 0; 0]
